*Heading
** Job name: Job-2 Model name: Model-1
** Generated by: Abaqus/CAE 2018
*Preprint, echo=NO, model=NO, history=NO, contact=NO
**
** PARTS
**
*Part, name=Part-2
*Node
      1,  0.100000001,           0.,  0.200000003
      2, 0.0799999982,           0.,  0.200000003
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*Element, type=R3D4
  1,   1,   2,  13,  12
  2,   2,   3,  14,  13
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*End Part
**
*Part, name=model-1
*Node
      1, -0.0945519656, 0.00610220805, -0.0691282526
      2, 0.00352311134, 0.00610220805, -0.0691282526
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*Element, type=C3D10
    1,  3884,  3885,  3886,  2897,  5979,  5978,  5977,  5981,  5980,  5982
    2,  2897,  3885,  1131,  3884,  5980,  5984,  5983,  5981,  5979,  5985
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*Nset, nset=Set-3, generate
     1,  38984,      1
*Elset, elset=Set-3, generate
     1,  23146,      1
*Orientation, name=Ori-1
1., 0., 0., 0., 1., 0.
1, 0.
** Section: Section-1
*Solid Section, elset=Set-3, orientation=Ori-1, material=Material-1
,
*End Part
**
**
** ASSEMBLY
**
*Assembly, name=Assembly
**
*Instance, name=model-1-1, part=model-1
*End Instance
**
*Instance, name=Part-2-1, part=Part-2
       -0.05,           0.,         -0.1
*End Instance
**
*Node
      1, -0.0500000007, -0.00499999989,           0.
*Node
      2, -0.0445000008, 0.0723122507,           0.
*Nset, nset=Set-1, instance=model-1-1
    77,    78,    79,    80,   676,   677
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*Elset, elset=Set-1, instance=model-1-1
   160,   206,   440,   457,   699,   869
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*Nset, nset=Set-2, instance=model-1-1
     3,     4,    21,    22,   167,   168
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*Elset, elset=Set-2, instance=model-1-1
   198,   621,   776,  1357,  1902,  2516
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*Nset, nset=Set-5
 1,
*Nset, nset=Set-6, instance=model-1-1
    77,    78,    79,    80,   676,   677
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*Elset, elset=Set-6, instance=model-1-1
   160,   206,   440,   457,   699,   869
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*Nset, nset=b_Set-3, instance=Part-2-1, generate
   1,  121,    1
*Elset, elset=b_Set-3, instance=Part-2-1, generate
   1,  100,    1
*Nset, nset=line, instance=model-1-1
    34,    38,   455,   456,   457,   458
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*Elset, elset=line, instance=model-1-1
  5308,  7408,  8183,  8514,  8623,  8666
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*Nset, nset=m_Set-8
 2,
*Nset, nset=_PickedSet11, internal
 1,
*Elset, elset=_Surf-1_S3, internal, instance=model-1-1
   198,   621,   776,  1902,  2516,  3206
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*Elset, elset=_Surf-1_S1, internal, instance=model-1-1
  4975,  6022,  6139,  6199,  6498,  6615
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*Elset, elset=_Surf-1_S2, internal, instance=model-1-1
  5286,  5880,  5987,  5994,  6032,  6074
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*Elset, elset=_Surf-1_S4, internal, instance=model-1-1
  1357,  5963,  6039,  6110,  6164,  6288
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*Surface, type=ELEMENT, name=Surf-1
_Surf-1_S3, S3
_Surf-1_S1, S1
_Surf-1_S2, S2
_Surf-1_S4, S4
*Elset, elset=_Surf-4_S3, internal, instance=model-1-1
   160,   457,   963,  1085,  1091,  1136
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*Elset, elset=_Surf-4_S4, internal, instance=model-1-1
   206,   699,  1257,  4444,  5616,  7742
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*Elset, elset=_Surf-4_S1, internal, instance=model-1-1
   440,   869,   993,  2103,  7001,  7152
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*Elset, elset=_Surf-4_S2, internal, instance=model-1-1
  7262, 10208, 10770, 11642, 12410, 12695
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*Surface, type=ELEMENT, name=Surf-4
_Surf-4_S3, S3
_Surf-4_S4, S4
_Surf-4_S2, S2
_Surf-4_S1, S1
*Elset, elset=_m_Surf-2_SNEG, internal, instance=Part-2-1, generate
   1,  100,    1
*Surface, type=ELEMENT, name=m_Surf-2
_m_Surf-2_SNEG, SNEG
*Elset, elset=_s_Surf-2_S3, internal, instance=model-1-1
   198,   621,   776,  1902,  2516,  3206
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*Elset, elset=_s_Surf-2_S1, internal, instance=model-1-1
  4975,  6022,  6139,  6199,  6498,  6615
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*Elset, elset=_s_Surf-2_S2, internal, instance=model-1-1
  5286,  5880,  5987,  5994,  6032,  6074
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*Elset, elset=_s_Surf-2_S4, internal, instance=model-1-1
  1357,  5963,  6039,  6110,  6164,  6288
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*Surface, type=ELEMENT, name=s_Surf-2
_s_Surf-2_S3, S3
_s_Surf-2_S1, S1
_s_Surf-2_S2, S2
_s_Surf-2_S4, S4
*Elset, elset=_s_Surf-5_S3, internal, instance=model-1-1
   160,   457,   963,  1085,  1091,  1136
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*Elset, elset=_s_Surf-5_S4, internal, instance=model-1-1
   206,   699,  1257,  4444,  5616,  7742
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*Elset, elset=_s_Surf-5_S1, internal, instance=model-1-1
   440,   869,   993,  2103,  7001,  7152
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*Elset, elset=_s_Surf-5_S2, internal, instance=model-1-1
  7262, 10208, 10770, 11642, 12410, 12695
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*Surface, type=ELEMENT, name=s_Surf-5
_s_Surf-5_S3, S3
_s_Surf-5_S4, S4
_s_Surf-5_S2, S2
_s_Surf-5_S1, S1
** Constraint: Constraint-1
*Rigid Body, ref node=_PickedSet11, elset=b_Set-3
*End Assembly
*Amplitude, name=Amp-1
             0.,              0.,              1.,              1.
**
** MATERIALS
**
*Material, name=Material-1
*Elastic, type=ENGINEERING CONSTANTS
 3.618e+10, 3.854e+10,  3.59e+10,     0.328,     0.356,     0.324, 1.367e+10, 1.156e+10
 1.211e+10,
*Plastic
 5.83137e+06,       0.
 6.37557e+06, 2.47e-05
 6.89715e+06, 4.94e-05
  7.4189e+06, 7.42e-05
 7.94512e+06, 9.91e-05
    8.44e+06, 0.000123
 8.98261e+06, 0.000148
 9.48613e+06, 0.000173
 1.00215e+07, 0.000198
 1.05133e+07, 0.000223
 1.10047e+07, 0.000248
  1.1514e+07, 0.000272
 1.20767e+07, 0.000297
 1.25826e+07, 0.000322
**
** INTERACTION PROPERTIES
**
*Surface Interaction, name=IntProp-1
1.,
*Friction, slip tolerance=0.005
 0.4,
*Surface Behavior, pressure-overclosure=HARD
**
** INTERACTIONS
**
** Interaction: Int-1
*Contact Pair, interaction=IntProp-1, type=SURFACE TO SURFACE
s_Surf-2, m_Surf-2
** ----------------------------------------------------------------
**
** STEP: Step-1
**
*Step, name=Step-1, nlgeom=YES, inc=10000000
*Static
0.01, 1., 1e-07, 0.1
**
** BOUNDARY CONDITIONS
**
** Name: BC-1 Type: Symmetry/Antisymmetry/Encastre
*Boundary
Set-5, ENCASTRE
** Name: BC-2 Type: Displacement/Rotation
*Boundary
Set-6, 1, 1
Set-6, 3, 3
Set-6, 4, 4
Set-6, 5, 5
Set-6, 6, 6
**
** LOADS
**
** Name: Load-1   Type: Pressure
*Dsload, amplitude=Amp-1
Surf-4, P, 150000.
**
** OUTPUT REQUESTS
**
*Restart, write, frequency=0
**
** FIELD OUTPUT: F-Output-1
**
*Output, field
*Node Output
RF, U
*Element Output, directions=YES
E, MISES, S
**
** HISTORY OUTPUT: H-Output-1
**
*Output, history, variable=PRESELECT
*End Step
